# Задано:
R := 287*J/(kg*K)
# Газ - Метан
Pn := 6 MPa
Tvs := -144 °C
# поменять Т 1 = -40 максимум
Ve := 50000/60*L/min = 0.0138889 m^3/s
Pvs := 0.3 MPa
Tvs1 := (-30 + 273.15)*K = 243.15 K
ρvoz := 1.2928  # Т 30 .. 20
Tos := (28 + 273.15)*K
z1 := 2
Pkar := Pvs
ΔT := 7 K
ρg := 0.656
# Решение:
Tvs2 := Tos + ΔT = 308.15 K
k := 1.4
PV == zRT == const
# 1. | 1.1 Определение общей степени повышения давления
Ve := Ve = 0.0138889 m^3/s
p_nu := 101133*Pa
ε := Pn/Pvs = 20  # Ve - нормальные условия с запасом
z_nu := 0.99813
# 1.2. Определение степени сжатия на каждой ступени
z_vs := 0.98960
ε11 := nthroot(ε, z1) = 4.47214
T_nu := 293*K
ε1 := 1.1*ε11 = 4.91935
ε2 := ε/ε1 = 4.06558
Ve := Ve*p_nu/(T_nu*z_nu)*Tvs1*z_vs/Pvs = 0.00385228 m^3/s  # перевод к Условиям на всасывание
# 1.3. Вычисление промежуточного давления
Pm := Pvs*ε1 = 1475805 Pa
# 1.4. По рекомендациям учебника задаются значения коэффициентов и приблизительной скорости
P1 == ro1*R*T1
A := 2.66*Pa^0.25
δf := 0.005
Cm := 1.5*m/s
# 2. Определение относительных гидравлических потерь на всасывании и нагнетании
P2 == ro2*R*T2
# 2.1. Первой ступени
Tvs1_k := Tvs1*ε1^((k - 1)/k) = 383.321 K
ro == m/v
δvs1 := δf + 0.3*(Cm/(3.55*m/s))^2*(ρg/ρvoz)*A/Pvs^0.25 = 0.00808902
Tvs2_k := Tvs2*ε2^((k - 1)/k) = 460.042 K
δn1 := 0.7*(Cm/(3.55*m/s))^2*(ρg/ρvoz)*A/Pm^0.25 = 0.00483973
# 2.2. Второй ступени
δvs2 := 0.3*(Cm/(3.55*m/s))^2*(ρg/ρvoz)*A/Pm^0.25 = 0.00207417
δn2 := 0.7*(Cm/(3.55*m/s))^2*(ρg/ρvoz)*A/Pn^0.25 = 0.00340832
# 3. Определение давления на нагнетании и всасывании
# 3.1. Первой ступени
Pvs1 := Pvs*(1 - δvs1) = 297573 Pa
Pn1 := Pm*(1 + δn1) = 1482947 Pa
# 3.2. Второй ступени
Pvs2 := Pm*(1 - δvs2) = 1472744 Pa
Pn2 := Pn*(1 + δn2) = 6020450 Pa
# 4. Уточнение значения степеней сжатия по ступеням
ε1' := Pn1/Pvs1 = 4.98347
ε2' := Pn2/Pvs2 = 4.08791
# 5. Определение коэффициентов подачи
# 5.1. По рекомендациям учебника задается мертвый объем и коэффициент адиабаты
am := 0.05
k := 1.4
# 5.2. Определение показателя политропы обратного расширения
m2 := 1.075
m1 := m2
m1 := 1 + 0.5*(k - 1) = 1.2
m2 := 1 + 0.62*(k - 1) = 1.248
# 1 ступень | 2 ступень
# 5.3. Определение λ0i (учитывает влияние мертвого объема)
λ01 := 1 - am*(ε1'^(1/m1) - 1) = 0.859346
λ02 := 1 - am*(ε2'^(1/m2) - 1) = 0.89549
_______________________________________________________________________________________
# 5.4. Определение λti (учитывает подогрев газа на всасывании)
λt1 := 1 - 0.01*(ε1' - 1) = 0.960165
λt2 := 1 - 0.01*(ε2' - 1) = 0.969121
________________________________________________________________________________________
# 5.5. Определение λdpi
# (уитывает потери при дросселировании)
λdr1 := 1 - δvs1 = 0.991911
λdr2 := 1 - δvs2 = 0.997926
________________________________________________________________________________________
# 5.7. Опредление коэффициентов подачи для ступеней
λ1 := λ01*λt1*λdr1 = 0.81844
λ2 := λ02*λt2*λdr2 = 0.866038
# 6. Определение описанного объема для ступеней
Vh1 := Ve/λ1 = 0.00470686 m^3/s
Vh2 := Ve*Pvs1*Tvs2/(λ2*Pvs2*Tvs1) = 0.00113903 m^3/s
con := Vh1*0.025 = 0.000117672 m^3/s
# 7. Определение хода поршня
c := 1*10^-4*m^3/s
# 7.1. Задание частоты вращения электродвигателя
n := 1450/60*s^-1
Vh1 := Vh1 + c
# 7.2. Определение диаметра поршней
Vh2 := Vh2 + c
D1 := sqrt(8*Vh1/(3.14*Cm)) = 0.0903578 m
Sh1 := Cm/(2*n) = 0.0310345 m
D2 := sqrt(8*Vh2/(3.14*Cm)) = 0.045875 m
# Принимаем значения D по ГОСТ:
D1gost := 0.11 m
D2gost := 0.055 m
# Вычисляем ход поршня для ступеней и выбираем оптимальные допустимые варианты
.
Sh1 := 0.7*D1gost = 0.077 m
Sh1' := 0.068 m
n := Cm/(2*Sh1') = 11.0294 1/s
n*60 = 661.765 1/s
n := 450/60*1/s
Sh1 := Vh1*4/(π*D1gost^2*n) = 0.0674412 m
Sh2 := Vh2*4/(π*D2gost^2*n) = 0.0695354 m
Sh2' := 0.068 m
# 8. Проверка соответствия параметров стандартным диапазонам значений
# Ускорение
# (Стандарт 17..60 м/с^2)
# Относительная длина хода
# (Cандарт 0.45-0.7)
# 1 ступень
Sh1'*n^2 = 3.825 m/s^2
ψ1 := Sh1'/D1gost = 0.618182
ψ2 := Sh2'/D2gost = 1.23636
# 2 ступень
Sh2'*n^2 = 3.825 m/s^2
# 9. Уточнение скоростей поршней
Cm1 := 2*Sh1'*n = 1.02 m/s
Cm2 := 2*Sh2'*n = 1.02 m/s
# 10. Вычисление описанного объема с учетом новых скоростей поршней, определение погрешности относительно старых значений
# 1 ступень | 2 ступень
Vh1' := π*D1gost^2*Cm1/8 = 0.00484669 m^3/s
Vh2' := π*D2gost^2*Cm2/8 = 0.00121167 m^3/s
Vh1 = 0.00480686 m^3/s
Vh2*3600 = 4.46051 m^3/s
Vh2 = 0.00123903 m^3/s
Vh1 := Vh1 - c
Vh2 := Vh2 - c
Vh1' := Vh1' - c
Vh2' := Vh2' - c
δ := (Vh1' - Vh1)/Vh1'*100 = 0.839052
δ := (Vh2' - Vh2)/Vh2'*100 = -2.46105
# δ < 5% удовлетроряет диапазону погрешности => принимаем данные значения величин как истинные
# 11. Пересчитаем величины давлений и степеней сжатия по ступеням
Pm' := Pm*Vh1'/Vh1*Vh2/Vh2' = 1524920 Pa
Pn1' := Pm'*(1 + δn1) = 1532300 Pa
Pvs2' := Pm'*(1 - δvs2) = 1521757 Pa
Pvs1 = 297573 Pa
ε1'' := Pn1'/Pvs1 = 5.14932
ε2'' := Pn2/Pvs2' = 3.95625
# 12. Определение коэффициентов возврата мощности
Tvs1_k := Tvs1*ε1^((k - 1)/k) = 383.321 K
Θ1 := 1 - am*(ε1''^(1/k) - 1) = 0.888801
Tvs2_k := Tvs2*ε2^((k - 1)/k) = 460.042 K
Θ2 := 1 - am*(ε2''^(1/k) - 1) = 0.916463
Pvs1 = 297573 Pa
# 13. Определение индикаторной мощности по ступеням
Vh1' = 0.00474669 m^3/s
Ni1 := Pvs1*Vh1'*Θ1*k/(k - 1)*(ε1''^((k - 1)/k) - 1) = 2624.05 W
Pvs2' = 1521757 Pa
Ni2 := Pvs2'*Vh2'*Θ2*k/(k - 1)*(ε2''^((k - 1)/k) - 1) = 2611.86 W
Vh2' = 0.00111167 m^3/s
# 14. Сравнение индикаторных мощностей ступеней
δ := (Ni1 - Ni2)/Ni1*100 = 0.464297  # <20% => удовлетворяет требованиям задания
# Противодействие на трение 30-50кПа
# Мощность на трение
# (N1+N2)/(N1+N2+Ntr)=кпд мех
# 15. Определение общей индикаторной мощности
Ni := Ni1 + Ni2 = 5235.91 W
Ptr := 50*10^3*Pa
# 16. Определение марки необходимого для обеспечения ресурса электродвигателя
Ntr1 := Ptr*Vh1' = 237.335 W
# Зададим механический  КПД
ηmeh := 0.85
Ntr2 := Ptr*Vh2' = 55.5837 W
Ntr := Ntr1 + Ntr2 = 292.918 W
# Определим необходимую мощность электродвигателя
ηmeh := (Ni1 + Ni2)/(Ni1 + Ni2 + Ntr) = 0.94702
Ne := Ni/ηmeh = 5528.83 W
Nэд := 1.15*Ne = 6358.15 W
Ne*(1 - 0.85) = 829.324 W
# По заданной частоте и полученной мощности подбираем электродвигатель. Ближайший по мощности - А200М4 с номинальной мощностью 37 кВт
# 17.  Определение изотермической и адиабатной мощностей
Nиз := Pvs1*Vh1'*λ1*(ln(ε1'') + ln(ε2'')) = 3484.48 W
Ns := k/(k - 1)*Pvs1*Vh1'*λ1*(ε1''^((k - 1)/k) + ε2''^((k - 1)/k) - 2) = 4363.85 W
# 18. Определение изотермического и адиабатного КПД
ηиз := Nиз/Ne = 0.630239
ηs := Ns/Ne = 0.78929
# 19. Определение поршневых сил давления в мертвых точках
n = 7.5 1/s
n*60 = 450 1/s
D1gost = 0.11 m
D2gost = 0.055 m
m1 = 1.2
Pn1' = 1532300 Pa
Pn2 = 6020450 Pa
m2 = 1.248
Pvs1 = 297573 Pa
Pvs2' = 1521757 Pa
Cm1 = 1.02 m/s
Sh1' = 0.068 m
Sh2' = 0.068 m
Vh1' = 0.00474669 m^3/s
Vh2' = 0.00111167 m^3/s
Cm2 = 1.02 m/s
Ntr1 = 237.335 W
Ntr2 = 55.5837 W
c
# Для построения графиков
R = 287 m^2/(K*s^2)
ΔVmo1 := Vh1'*(1 - λ01) = 0.000667642 m^3/s
ΔVmo2 := Vh2'*(1 - λ02) = 0.00011618 m^3/s
Vmo1 := Vh1'*am = 0.000237335 m^3/s
Vmo2 := Vh2'*am = 5.55837e-5 m^3/s
λ01 = 0.859346
ΔS1 := R*ln(Pvs/Pvs1) = 2.33099 m^2/(K*s^2)
ΔS2 := R*ln(Pn1'/Pm') = 1.38565 m^2/(K*s^2)
ΔS3 := R*ln(Pm'/Pvs2') = 0.595904 m^2/(K*s^2)
ΔS4 := R*ln(Pn2/Pn) = 0.976524 m^2/(K*s^2)
# Построение графика P-V
# Точка 4
V4 := 60*(Vmo1 + ΔVmo1) = 0.0542986 m^3/s
P1 := Pvs1 = 297573 Pa
# Точка 1
V1 := 60*(Vmo1 + Vh1') = 0.299042 m^3/s
P4 := P1 = 297573 Pa
# Точка 2
V2 := V1*(Pvs1/Pn1')^(1/k) = 0.0927553 m^3/s
P2 := Pn1' = 1532300 Pa
# Точка 3
P3 := Pn1' = 1532300 Pa
V3 := 60*Vmo1 = 0.0142401 m^3/s
# Точка 4`
V4' := 60*(Vmo2 + ΔVmo2) = 0.0103058 m^3/s
P1' := Pvs2' = 1521757 Pa
# Точка 1`
V1' := 60*(Vmo2 + Vh2') = 0.0700354 m^3/s
P4' := P1' = 1521757 Pa
# Точка 2`
V2' := V1'*(Pvs2'/Pn2)^(1/k) = 0.0262232 m^3/s
P2' := Pn2 = 6020450 Pa
# Точка 3`
P3' := Pn2 = 6020450 Pa
V3' := 60*Vmo2 = 0.00333502 m^3/s
# Операции для построения графика
z := 0, 0.1 .. 1.5
P1vs(z) := Pvs
P1vs'(z) := Pvs1
P1n'(z) := Pn1'
P2vs'(z) := Pvs2'
P1m'(z) := Pm'
P2n(z) := Pn
P2n'(z) := Pn2
x := Pvs1, Pvs1 + 1000*Pa .. Pn1'
x1 := Pvs2', Pm' .. Pn2
Pn1' = 1532300 Pa
Ad12(x) := V1*(Pvs1/x)^(1/k)
Ad12'(x1) := V1'*(Pvs2'/x1)^(1/k)
Ad34(x) := V3*(Pn1'/x)^(1/m1)
Ad34'(x1) := V3'*(Pn2/x1)^(1/m1)
P
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P - V
# Постороение графика T - S
Tvs = 129.15 K
Tvs2 = 308.15 K
# Точка 0
T0 := Tvs = 129.15 K
S0 := 3867.15*J/(K*kg)
# Точка 1
T1 := T0
S1 := S0 + ΔS1 = 3869.48 m^2/(K*s^2)
# Точка 2
S2 := S1
T2 := T1*(Pn1'/Pvs1)^((k - 1)/k) = 206.277 K
# Точка 3
T3 := T2 = 206.277 K
S3 := S2 + ΔS2 = 3870.87 m^2/(K*s^2)
# Точка 4
Cp := 1000*J/(K*kg)
S4 := Cp*ln(Tvs2/T3) + S3 = 4272.23 m^2/(K*s^2)
T4 := Tvs2 = 308.15 K
# Точка 1`
T1' := Tvs2 = 308.15 K
S1' := S4 + ΔS3 = 4272.83 m^2/(K*s^2)
# Точка 2`
S2' := S1' = 4272.83 m^2/(K*s^2)
T2' := Tvs2*(Pn2/Pvs2')^((k - 1)/k) = 456.473 K
# Точка 3`
T3' := T2' = 456.473 K
S3' := S2' + ΔS4 = 4273.8 m^2/(K*s^2)
# Точка 4`
S4' := S3' + Cp*ln((Tvs2 + ΔT)/T3') = 3903.32 m^2/(K*s^2)
T4' := Tvs2 + ΔT = 315.15 K
# Операции для построения графика
Tvs1 = 243.15 K
x := Tvs1, 294.15 K .. 430.15 K
IsoPvs(x) := Cp*ln(x/Tvs1) + S0
IsoPvs1(x) := Cp*ln(x/Tvs1) + S1
x1 := Tvs1, 294.15 K .. 430.15 K
x2 := Tvs1, 294.15 K .. 430.15 K
IsoPn1(x) := Cp*ln(x/T2) + S2
IsoPn2(x) := Cp*ln(x/T2') + S2'
IsoPm(x) := Cp*ln(x/T2) + S3
IsoPn(x) := Cp*ln(x/T2') + S3'
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