# Основные размеры. Расчет по Пластинину том2 Глава 3.3. Поршни и штоки(стр 287)
# Тронковый поршень
D := 0.1*m
Nmax := 2343*N
kmax := Nmax/(D*1*D) = 234300 kg/(m*s^2)
# k < 0.15...0.35 MH/м^2  (большие значения
# для быстроходных)
# Пластинин стр 287 том2
δ := 0.15*D = 0.015 m
e := 12*10^-3*m = 0.012 m
S1 := 10*10^-3*m = 0.01 m
h := 3*10^-3*m = 0.003 m  # толщина кольца
t := 3.5*10^-3*m = 0.0035 m  # t - радиальная ширина поршневого кольца
Dвнк := D - (2*t + 0.006*D) = 0.0924 m  # Внутренний диаметр канавки
dп := 0.25*D = 0.025 m  # диаметр поршневого пальца
dб := 1.35*dп = 0.03375 m  # бобышка
